# Gram Schmit Process:
v_1 := [3; 0; -1]
v_2 := [8; 5; -6]
u_1 := v_1
u_2 := v_2 - v_2*v_1/(v_1*v_1)*v_1 → [-1; 5; -3]
x_1 := [2; -5; 1]
x_2 := [4; -1; 2]
v_1 := x_1
v_2 := x_2 - x_2*x_1/(x_1*x_1)*x_1 → [3; 3/2; 3/2]
u_1 := v_1/sqrt(v_1*v_1) → [sqrt(30)/15; -sqrt(30)/6; sqrt(30)/30]
u_2 := v_2/sqrt((v_2*v_2)) → [sqrt(2)*sqrt(3)/3; sqrt(2)*sqrt(3)/6; sqrt(2)*sqrt(3)/6]
Q := [5/6, -1/6; 1/6, 5/6; -3/6, 1/6; 1/6, 3/6]
A := [5, 9; 1, 7; -3, -5; 1, 5]
R := transpose(Q)*A = [6, 12; 0, 6]
x_1 := [-10; 2; -6; 16; 2]
x_2 := [13; 1; 3; -16; 1]
x_3 := [7; -5; 13; -2; -5]
x_4 := [-11; 3; -3; 5; -7]
v_1 := x_1
v_2 := x_2 - x_2*x_1/(x_1*x_1)*x_1 → [3; 3; -3; 0; 3]
v_3 := x_3 - (x_3*x_1/(x_1*x_1)*x_1 + x_3*v_2/(v_2*v_2)*v_2) → [6; 0; 6; 6; 0]
v_4 := x_4 - (x_4*x_1/(x_1*x_1)*x_1 + x_4*v_2/(v_2*v_2)*v_2 + x_4*v_3/(v_3*v_3)*v_3) → [0; 5; 0; 0; -5]
u_1 := v_1/sqrt(v_1*v_1) → [-1/2; 1/10; -3/10; 4/5; 1/10]
u_2 := v_2/sqrt(v_2*v_2) → [1/2; 1/2; -1/2; 0; 1/2]
u_3 := v_3/sqrt(v_3*v_3) → [sqrt(3)/3; 0; sqrt(3)/3; sqrt(3)/3; 0]
u_4 := v_4/sqrt(v_4*v_4) → [0; sqrt(2)/2; 0; 0; -sqrt(2)/2]
Q := [-1/2, 1/2, sqrt(3)/3; 1/10, 1/2, 0; -3/10, -1/2, sqrt(3)/3; 4/5, 0, sqrt(3)/3; 1/10, 1/2, 0]
A := [-10, 13, 7, -11; 2, 1, -5, 3; -6, 3, 13, -3; 16, -16, -2, 5; 2, 1, -5, -7]
R := transpose(Q)*A → [20, -20, -10, 10; 0, 6, -8, -6; 0, 0, 6*sqrt(3), -3*sqrt(3)]
